// COMSOL Multiphysics 6.1.0.282 model "Gravitational lensing modeling.mph"
// Outline of the model tree

Parameters
  r0 = 7e5[km]
  m0 = 2e30[kg]

Variables
  var1 "Variables 1"
    r = sqrt(x^2+y^2+z^2+eps)  // radial distance from sun
    n = 1+(2*G_const*m0)/((c_const)^2*r)  // Refractive index

Geometry
  geom1 "Geometry 1" (3D, length unit km)
    sph1: Sphere | r = r0
    blk1: Block | pos = {0.5e8, 0, 0}; base = center; size = {2e8, 1e7, 1e7}
    fin: Finalize "Form Union"
  pgeom_gop "Geometry" (1D, length unit m)
    pt1: Point

Materials
  mat1: Common "Material 1" on all domains
    RefractiveIndex
      n = n
      ki = 0

Physics
  gop: GeometricalOptics on all domains
    dependent variable q = {qx, qy, qz}
    MaximumSecondary.MaximumSecondary = 0
    mp1: MediumProperties (default)
    matd1: MaterialDiscontinuity (default)
    op1: RayProperties | RayPropertySpecification = SpecifyVacuumWavelength; nu = 4.54e14[Hz]; lambda0 = 660[nm]; mp = 1
    relg1: ReleaseGrid "Release from Grid 1" | x0 = {-0.5e8, -7.01e5, 0}; L0 = {1, 0, 0}

Mesh
  mesh1 "Mesh 1" (physics-controlled)
    size: MeshSizeDefault | hauto = 3

Studies
  std1 "Study 1"
    rtrac: RayTracing
      timestepspec = specifylength
      tlist = range(0,0.01,1)
      lunit = km
      llist = range(0,2020202.0202020202,200000000)

Solver configurations
  sol1 "Solution 1" (study std1)
    v1: Variables "Dependent Variables 1"
    t1: Time "Time-Dependent Solver 1"
      tlist = 0.0 6.73866858986 13.4773371797 20.2160057696 26.9546743594 33.6933429493 40.4320115392 47.1706801290316 53.9093487189 60.6480173088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
      rtol = 1.0E-5
      timemethod = genalpha
      estrat = exclude
      tstepsgenalpha = strict
      maxstepconstraintgenalpha = expr
      maxstepexpressiongenalpha = 1
      fc1: FullyCoupled | linsolver = i1; ntolfact = 0.1
      i1: Iterative
        ja1: Jacobi

Datasets
  dset1: Solution | solution = sol1
  ray1: Ray
    solution = sol1
    rgeomspec = fromphysics
    rgeom = pgeom_gop
    posdof = {comp1.qx, comp1.qy, comp1.qz}
    physicsinterface = gop

Derived values
  gev1: EvalGlobal "Global Evaluation 1"
    data = dset1
    table = tbl1
    expr = gop.gopaveop1(abs(3600*asin(gop.niy)))
    unit = deg

Tables
  tbl1: Table
    // Global Evaluation 1
    Time (s) | Average over rays (deprecated) (gop) (deg)
    667.128 | 1.7386

Plots
  pg1: PlotGroup3D "Ray Trajectories (gop)" | data = ray1
    rtrj1: RayTrajectories
      col1: Color "Color Expression 1" | expr = t
      filt1: RayTrajectoriesFilter "Filter 1"
  pg2: PlotGroup1D "deviation from initial direction" | data = ray1; ylabel = Deflection angle in arc seconds
    rtp1: Ray1D "Ray 1" | expr = 3600*abs(asin(gop.niy)); unit = °