// COMSOL Multiphysics 6.1.0.282 model "corner reflector.mph"
// Outline of the model tree

Geometry
  geom1 "Geometry 1" (3D, length unit m)
    pi1: PartInstance "Rectangular Planar Annulus 1"
      part = part1
      inputname = {w0, h0, w1, h1, nix, niy, niz, nwx, nwy, nwz}
      inputexpr = {50.0[mm], 50.0[mm], 0[mm], 0[mm], 0, 0, 1, 0, 1, 0}
      inputvalue = {0.05 [m], 0.05 [m], 0.0 [m], 0.0 [m], 0.0, 0.0, 1.0, 0.0, 1.0, 0.0}
      selnamebnd = All
      selcontributetobnd = none
      selkeepbnd = off
      selshowbnd = on
      seltagbnd = pi1_sel1
      selkeepnoncontr = off
      argunit = {m, m, m, m, , , , , , }
      lengthunit = m
      outputwptag = wp1
      outputwpmatrix = {0, 0, 0, 0, 1, 0, -1, 0, 0}
    pi2: PartInstance "Rectangular Planar Annulus 2"
      part = part1
      inputname = {w0, h0, w1, h1, nix, niy, niz, nwx, nwy, nwz}
      inputexpr = {50.0[mm], 50.0[mm], 0[mm], 0[mm], 0, 1, 0, 1, 0, 0}
      inputvalue = {0.05 [m], 0.05 [m], 0.0 [m], 0.0 [m], 0.0, 1.0, 0.0, 1.0, 0.0, 0.0}
      displ = {0, -25[mm], 25[mm]}
      selnamebnd = All
      selcontributetobnd = none
      selkeepbnd = off
      selshowbnd = on
      seltagbnd = pi2_sel1
      selkeepnoncontr = off
      argunit = {m, m, m, m, , , , , , }
      lengthunit = m
      outputwptag = wp1
      outputwpmatrix = {0, 0, 0, 1, 0, 0, 0, 0, -1}
    pi3: PartInstance "Rectangular Planar Annulus 3"
      part = part1
      inputname = {w0, h0, w1, h1, nix, niy, niz, nwx, nwy, nwz}
      inputexpr = {50.0[mm], 50.0[mm], 0[mm], 0[mm], 1, 0, 0, 0, 1, 0}
      inputvalue = {0.05 [m], 0.05 [m], 0.0 [m], 0.0 [m], 1.0, 0.0, 0.0, 0.0, 1.0, 0.0}
      displ = {-25[mm], 0, 25[mm]}
      selnamebnd = All
      selcontributetobnd = none
      selkeepbnd = off
      selshowbnd = on
      seltagbnd = pi3_sel1
      selkeepnoncontr = off
      argunit = {m, m, m, m, , , , , , }
      lengthunit = m
      outputwptag = wp1
      outputwpmatrix = diag{0, 1, 1}
    pi4: PartInstance "Circular Planar Annulus 1"
      part = part2
      inputname = {d0, d1, nix, niy, niz}
      inputexpr = {50.0[mm], 0.0[mm], 1, 1, 1}
      inputvalue = {0.05 [m], 0.0 [m], 1.0, 1.0, 1.0}
      displ = {0.1, 0.1, 0.1}
      selnamebnd = All
      selshowbnd = on
      seltagbnd = pi4_sel1
      selkeepnoncontr = off
      argunit = {m, m, , , }
      lengthunit = m
      outputwptag = wp1
      outputwpmatrix = {0, 0, 0, 0.408248290464, 0.408248290464, -0.816496580928, -0.707106781187, 0.707106781187, 0}
    fin: Finalize "Form Union"
  pgeom_gop "Geometry" (1D, length unit m)
    pt1: Point
  part1 "Rectangular Planar Annulus" (3D, length unit m)
    pch1: ParameterCheck | condition = w0 <= 0
    pch2: ParameterCheck | condition = h0 <= 0
    pch3: ParameterCheck | condition = w1 < 0
    pch4: ParameterCheck | condition = h1 < 0
    pch5: ParameterCheck | condition = w0 <= w1
    pch6: ParameterCheck | condition = h0 <= h1
    pch7: ParameterCheck | condition = nix == 0 && niy == 0 && niz == 0
    pch8: ParameterCheck | condition = nwx == 0 && nwy == 0 && nwz == 0
    pch9: ParameterCheck | condition = n1x == nw1x && n1y == nw1y && n1z == nw1z
    wp1: WorkPlane "%Surface" | planetype = coordinates; genpoints = {{0, 0, 0}, {n2x, n2y, n2z}, {tw11x, tw11y, tw11z}}
      r1: Rectangle | base = center; size = {w0, h0}
      if1: If | condition = ( h1 > 0 ) && ( w1 > 0 )
      r2: Rectangle | base = center; size = {w1, h1}
      dif1: Difference | input = r1; input2 = r2
      endif1: EndIf
    sel1: ExplicitSelection "%All" | selection = wp1.dif1 boundaries 1
  part2 "Circular Planar Annulus" (3D, length unit m)
    pch1: ParameterCheck | condition = d0<0
    pch2: ParameterCheck | condition = d1<0
    pch3: ParameterCheck | condition = d0<d1
    wp1: WorkPlane "%Surface" | planetype = normalvector; normalvector = {nix, niy, niz}; unite = on
      c1: Circle | r = d0/2
      if1: If | condition = d1 > 0
      c2: Circle | r = d1/2
      dif1: Difference | input = c1; input2 = c2
      endif1: EndIf
    sel1: ExplicitSelection "%All" | selection = wp1.dif1 boundaries 1

Physics
  gop: GeometricalOptics on all domains
    dependent variable q = {qx, qy, qz}
    ExteriorUnmeshedProperties.DispersionModel = SpecifyRefractiveIndex
    CountReflections.CountReflections = 1
    MaximumSecondary.MaximumSecondary = 0
    mp1: MediumProperties (default)
    matd1: MaterialDiscontinuity (default)
    op1: RayProperties | RayPropertySpecification = SpecifyVacuumWavelength; nu = 4.54e14[Hz]; lambda0 = 660[nm]; mp = 1
    mir1: Mirror on boundaries 1-3
    wall1: Wall on boundaries 4
    relg1: ReleaseGrid "Release from Grid 1"
      GridType = Hexapolar
      qcc = {0.07, 0.07, 0.07}
      rcc = {1, 1, 1}
      Rc = 2[mm]
      Ncr = 1
      L0 = {-1, -1, -1}

Mesh
  mesh1 "Mesh 1" (physics-controlled)
    size: MeshSizeDefault | hauto = 3

Studies
  std1 "Study 1"
    rtrac: RayTracing | tlist = range(0,0.01,1)

Solver configurations
  sol1 "Solution 1" (study std1)
    v1: Variables "Dependent Variables 1"
    t1: Time "Time-Dependent Solver 1"
      tlist = range(0,0.01,1)
      rtol = 1.0E-5
      timemethod = genalpha
      estrat = exclude
      tstepsgenalpha = strict
      fc1: FullyCoupled | linsolver = i1; ntolfact = 0.1
      i1: Iterative
        ja1: Jacobi

Datasets
  dset1: Solution | solution = sol1
  ray1: Ray
    solution = sol1
    rgeomspec = fromphysics
    rgeom = pgeom_gop
    posdof = {comp1.qx, comp1.qy, comp1.qz}
    physicsinterface = gop

Plots
  pg1: PlotGroup3D "Ray Trajectories (gop)" | data = ray1
    rtrj1: RayTrajectories
      col1: Color "Color Expression 1" | expr = t
      filt1: RayTrajectoriesFilter "Filter 1"
    vol1: Volume | expr = 1