// COMSOL Multiphysics 6.1.0.282 model "retroreflector.mph"
// Outline of the model tree

Geometry
  geom1 "Geometry 1" (3D, length unit m)
    pi1: PartInstance "Corner Cube Retroreflector 1"
      part = part1
      inputname = {d, Hc, nix, niy, niz}
      inputexpr = {10[mm], 12[mm], 0, 0, 1}
      inputvalue = {0.01 [m], 0.012 [m], 0.0, 0.0, 1.0}
      selnamebnd = {Exterior, Corner cube}
      selshowbnd = {on, on}
      seltagbnd = {pi1_sel2, pi1_sel3}
      selnamedom = All
      selshowdom = on
      seltagdom = pi1_sel1
      selkeepnoncontr = off
      argunit = {m, m, , , }
      lengthunit = m
    pi2: PartInstance "Circular Planar Annulus 1"
      part = part2
      inputname = {d0, d1, nix, niy, niz}
      inputexpr = {10.0[mm], 0.0[mm], 0, 0, 1}
      inputvalue = {0.01 [m], 0.0 [m], 0.0, 0.0, 1.0}
      displ = {0, 0, -0.05}
      selnamebnd = All
      selshowbnd = on
      seltagbnd = pi2_sel1
      selkeepnoncontr = off
      argunit = {m, m, , , }
      lengthunit = m
      outputwptag = wp1
      outputwpmatrix = {0, 0, 0, 1, 0, 0, 0, 1, 0}
    fin: Finalize "Form Union"
  pgeom_gop "Geometry" (1D, length unit m)
    pt1: Point
  part1 "Corner Cube Retroreflector" (3D, length unit m)
    pch1: ParameterCheck | condition = d<0
    pch2: ParameterCheck | condition = d>=sqrt(2)*Hc
    pch3: ParameterCheck | condition = Hc<0
    blk1: Block | size = {2/sqrt(3)*Hc, 2/sqrt(3)*Hc, 2/sqrt(3)*Hc}
    rot1: Rotate | input = blk1; axis = {0, 1, -1}; axistype = cartesian; rot = phi_rot[rad]
    cyl1: Cylinder | axis = {1, 0, 0}; axistype = cartesian; r = d/2; h = Hc
    int1: Intersection | input = cyl1, rot1; face = all
    mir1: Mirror | input = int1; axis = {1, 0, 0}
    rot2: Rotate | input = mir1; axis = {0, ury, urz}; axistype = cartesian; rot = theta_rot[rad]
    sel1: ExplicitSelection "%All" | selection = rot2(1) domains 1
    sel2: ExplicitSelection "%Exterior" | selection = rot2(1) boundaries 1-8
    sel3: ExplicitSelection "%Corner_cube" | selection = rot2(1) boundaries 1-3
  part2 "Circular Planar Annulus" (3D, length unit m)
    pch1: ParameterCheck | condition = d0<0
    pch2: ParameterCheck | condition = d1<0
    pch3: ParameterCheck | condition = d0<d1
    wp1: WorkPlane "%Surface" | planetype = normalvector; normalvector = {nix, niy, niz}; unite = on
      c1: Circle | r = d0/2
      if1: If | condition = d1 > 0
      c2: Circle | r = d1/2
      dif1: Difference | input = c1; input2 = c2
      endif1: EndIf
    sel1: ExplicitSelection "%All" | selection = wp1.dif1 boundaries 1

Physics
  gop: GeometricalOptics on all domains
    dependent variable q = {qx, qy, qz}
    MaximumSecondary.MaximumSecondary = 0
    mp1: MediumProperties (default) | n_mat = userdef; n = 1
    matd1: MaterialDiscontinuity (default)
    op1: RayProperties | RayPropertySpecification = SpecifyVacuumWavelength; nu = 4.54e14[Hz]; lambda0 = 660[nm]; mp = 1
    wall1: Wall on boundaries 1
    relg1: ReleaseGrid "Release from Grid 1"
      GridType = Hexapolar
      qcc = {0, 0, -0.05}
      rcc = {0, 0, 1}
      Rc = 4[mm]
      Ncr = 3
      L0 = {0, 0, 1}
    wall2: Wall on boundaries 4 | WallCondition = Pass
    mir1: Mirror on boundaries 5, 6, 8

Mesh
  mesh1 "Mesh 1" (physics-controlled)

Studies
  std1 "Study 1"
    rtrac: RayTracing | timestepspec = specifylength; tlist = range(0,0.01,1)

Solver configurations
  sol1 "Solution 1" (study std1)
    v1: Variables "Dependent Variables 1"
    t1: Time "Time-Dependent Solver 1"
      tlist = 0.0 3.33564095198e-11 6.67128190396e-11 1.00069228559e-10 1.33425638079e-10 1.66782047599e-10 2.00138457119e-10 2.33494866639e-10 2.66851276159e-10 3.00207685678e-10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
      rtol = 1.0E-5
      timemethod = genalpha
      estrat = exclude
      tstepsgenalpha = strict
      fc1: FullyCoupled | linsolver = i1; ntolfact = 0.1
      i1: Iterative
        ja1: Jacobi

Datasets
  dset1: Solution | solution = sol1
  ray1: Ray
    solution = sol1
    rgeomspec = fromphysics
    rgeom = pgeom_gop
    posdof = {comp1.qx, comp1.qy, comp1.qz}
    physicsinterface = gop

Plots
  pg1: PlotGroup3D "Ray Trajectories (gop)" | data = ray1
    rtrj1: RayTrajectories
      col1: Color "Color Expression 1" | expr = t
      filt1: RayTrajectoriesFilter "Filter 1"