// COMSOL Multiphysics 6.1.0.282 model "laser between mirrors and lens.mph"
// Outline of the model tree

Parameters
  L = 0.1[m]  // mirror-lens distance
  D = 25[mm]  // mirror Diameter
  f = 0.05[m]  // lens focal distance
  n = 1.5  // refractive index
  R = 0.1[m]  // radius of curvature
  th = 1[deg]  // ray release angle
  T0 = 1[us]  // max time simulation run

Geometry
  geom1 "Geometry 1" (3D, length unit m)
    pi1: PartInstance "Spherical Equi-Convex Lens 3D 1"
      part = part1
      inputname = {R, Tc, d, nix, niy, niz, n_extra_r, n_extra_a}
      inputexpr = {R, 2[mm], D, 0, 0, 1, 0, 0}
      inputvalue = {0.1 [m], 0.002 [m], 0.025 [m], 0.0, 0.0, 1.0, 0.0, 0.0}
      displ = {0, 0, L-1[mm]}
      selnamepnt = {Surface 1 vertex, Surface 2 vertex}
      selshowpnt = {on, on}
      seltagpnt = {pi1_ballsel3, pi1_ballsel4}
      selnamebnd = {Exterior, Surface 1, Surface 2, Edges}
      selshowbnd = {on, on, on, on}
      seltagbnd = {pi1_sel2, pi1_ballsel1, pi1_ballsel2, pi1_comsel2}
      selnamedom = All
      selshowdom = on
      seltagdom = pi1_sel1
      selkeepnoncontr = off
      argunit = {m, m, m, , , , , }
      lengthunit = m
      outputwptag = {wp1, wp2, wp3, wp4}
      outputwpmatrix = 
        {0, 0, 0, 1, 0, 0, 0, 1, 0}
        {0, 0, 0.002, 1, 0, 0.002, 0, 1, 0.002}
        {0, 0, 0.000784325835078, 1, 0, 0.000784325835078, 0, 1, 0.000784325835078}
        {0, 0, -0.000784325835078, 1, 0, -0.000784325835078, 0, 1, -0.000784325835078}
    cyl1: Cylinder | pos = {0, 0, -10[mm]}; r = D/2; h = 10[mm]
    cyl2: Cylinder | pos = {0, 0, 2*L}; r = D/2; h = 10[mm]
    fin: Finalize "Form Union"
  pgeom_gop "Geometry" (1D, length unit m)
    pt1: Point
  part1 "Spherical Equi-Convex Lens 3D" (3D, length unit m)
    pch1: ParameterCheck | condition = d <= 0
    pch2: ParameterCheck | condition = Tc <= 0
    pch3: ParameterCheck | condition = Te <= 0
    pch4: ParameterCheck | condition = if(abs(R) > 0,abs(R) < d/2,0)
    pch5: ParameterCheck | condition = r > r_max
    wp1: WorkPlane "%Surface_X_vertex_intersection[lens]#1"
      planetype = coordinates
      genpoints = {{0, 0, 0}, {t2x, t2y, t2z}, {t1x, t1y, t1z}}
      unite = on
    wp2: WorkPlane "%Surface_X_vertex_intersection[lens]#2"
      planetype = transformed
      workplane = wp1
      transdispl = {0, 0, Tc}
      unite = on
    wp3: WorkPlane "%Surface_X_edge[lens]#1"
      planetype = transformed
      workplane = wp1
      transdispl = {0, 0, dT}
      unite = on
    wp4: WorkPlane "%Surface_X_edge[lens]#2"
      planetype = transformed
      workplane = wp1
      transdispl = {0, 0, -dT}
      unite = on
    cyl1: Cylinder | r = r; h = Tc
    if101: If "If phi < 1e-3" | condition = phi < 1e-3
    imp101: Import
      contributeto = csel2
      type = native
      filename = Ray_Optics_Module/3D/Spherical_Lenses/spherical_patch_1e-3.mphtxt
      meshfilename = Ray_Optics_Module/3D/Spherical_Lenses/spherical_patch_1e-3.mphtxt
    elseif102: ElseIf "Else If phi >= 1e-3 && phi < 0.01" | condition = phi >= 1e-3 && phi < 0.01
    imp102: Import
      contributeto = csel2
      type = native
      filename = Ray_Optics_Module/3D/Spherical_Lenses/spherical_patch_0.01.mphtxt
      meshfilename = Ray_Optics_Module/3D/Spherical_Lenses/spherical_patch_0.01.mphtxt
    elseif103: ElseIf "Else If phi >= 0.01 && phi < 0.1" | condition = phi >= 0.01 && phi < 0.1
    imp103: Import
      contributeto = csel2
      type = native
      filename = Ray_Optics_Module/3D/Spherical_Lenses/spherical_patch_0.1.mphtxt
      meshfilename = Ray_Optics_Module/3D/Spherical_Lenses/spherical_patch_0.1.mphtxt
    elseif104: ElseIf "Else If phi >= 0.1 && phi < 0.2" | condition = phi >= 0.1 && phi < 0.2
    imp104: Import
      contributeto = csel2
      type = native
      filename = Ray_Optics_Module/3D/Spherical_Lenses/spherical_patch_0.2.mphtxt
      meshfilename = Ray_Optics_Module/3D/Spherical_Lenses/spherical_patch_0.2.mphtxt
    elseif105: ElseIf "Else If phi >= 0.2 && phi < 0.5" | condition = phi >= 0.2 && phi < 0.5
    imp105: Import
      contributeto = csel2
      type = native
      filename = Ray_Optics_Module/3D/Spherical_Lenses/spherical_patch_0.5.mphtxt
      meshfilename = Ray_Optics_Module/3D/Spherical_Lenses/spherical_patch_0.5.mphtxt
    elseif106: ElseIf "Else If phi >= 0.5 && phi < 1.0" | condition = phi >= 0.5 && phi < 1.0
    imp106: Import
      contributeto = csel2
      type = native
      filename = Ray_Optics_Module/3D/Spherical_Lenses/spherical_patch_1.0.mphtxt
      meshfilename = Ray_Optics_Module/3D/Spherical_Lenses/spherical_patch_1.0.mphtxt
    elseif107: ElseIf "Else If phi >= 1.0 && phi < 1.5" | condition = phi >= 1.0 && phi < 1.5
    imp107: Import
      contributeto = csel2
      type = native
      filename = Ray_Optics_Module/3D/Spherical_Lenses/spherical_patch_1.5.mphtxt
      meshfilename = Ray_Optics_Module/3D/Spherical_Lenses/spherical_patch_1.5.mphtxt
    endif101: EndIf
    sca1: Scale | contributeto = csel2; input = selection csel2; isotropic = abs(R/1[m]); factor = abs(R/1[m])
    mov1: Move | contributeto = csel2; input = selection csel2; displx = 0; disply = 0; displz = -abs(R)+Tc
    mir1: Mirror | contributeto = csel2; input = selection csel2; keep = on; pos = {0, 0, Tc/2}
    par1: Partition "Partition Objects 1" | input = cyl1; tool = selection csel2; workplane = wp4
    boxsel1: BoxSelection | entitydim = 3; zmin = Tc/2; zmax = Tc/2
    comsel1: ComplementSelection | entitydim = 3; input = {boxsel1}
    del1: Delete "Delete Entities 1" | contributeto = csel1; input = selection comsel1
    if200: If "If n_extra_r > 0 || n_extra_a > 0" | condition = n_extra_r > 0 || n_extra_a > 0
    if201: If "If n_extra_r > 0" | condition = n_extra_r > 0
    pol1: Polygon
      contributeto = csel3
      x = range(-r,dr,r)
      y = 0
      z = C*range(-r,dr,r)^2/(1 + sqrt(1 - C^2*range(-r,dr,r)^2))
    pol2: Polygon
      contributeto = csel3
      x = 0
      y = range(-r,dr,r)
      z = C*range(-r,dr,r)^2/(1 + sqrt(1 - C^2*range(-r,dr,r)^2))
    pol3: Polygon
      contributeto = csel3
      x = range(-r,dr,r)
      y = 0
      z = (Tc - C*range(-r,dr,r)^2/(1 + sqrt(1 - C^2*range(-r,dr,r)^2)))
    pol4: Polygon
      contributeto = csel3
      x = 0
      y = range(-r,dr,r)
      z = (Tc - C*range(-r,dr,r)^2/(1 + sqrt(1 - C^2*range(-r,dr,r)^2)))
    endif201: EndIf
    if202: If "If n_extra_a > 0" | condition = n_extra_a > 0
    pol5: Polygon
      contributeto = csel3
      x = r*cos(range(0,2*pi/(4*(n_extra_a+1)),2*pi))
      y = r*sin(range(0,2*pi/(4*(n_extra_a+1)),2*pi))
      z = dT
    pol6: Polygon
      contributeto = csel3
      x = r*cos(range(0,2*pi/(4*(n_extra_a+1)),2*pi))
      y = r*sin(range(0,2*pi/(4*(n_extra_a+1)),2*pi))
      z = (Tc - dT)
    endif202: EndIf
    cpt1: ConvertToPoint | contributeto = csel1; input = selection csel3
    uni1: Union | contributeto = csel1; input = selection csel1
    endif200: EndIf
    rot1: Rotate
      contributeto = csel1
      input = selection csel1
      axis = {urx, ury, urz}
      axistype = cartesian
      rot = theta_rot[rad]
    sel1: UnionSelection "%All" | entitydim = 3; input = {csel1.dom}
    sel2: UnionSelection "%Exterior" | entitydim = 2; input = {csel1.bnd}
    ballsel1: BallSelection "%Surface_X#1" | entitydim = 2; r = Tc/1000; contributeto = csel4.bnd
    ballsel2: BallSelection "%Surface_X#2"
      entitydim = 2
      posx = Tc*n1x
      posy = Tc*n1y
      posz = Tc*n1z
      r = Tc/1000
      contributeto = csel4.bnd
    comsel2: ComplementSelection "%Edges[lens]" | entitydim = 2; input = {csel4.bnd}
    ballsel3: BallSelection "%Surface_X_vertex[lens]#1"
    ballsel4: BallSelection "%Surface_X_vertex[lens]#2" | posx = Tc*n1x; posy = Tc*n1y; posz = Tc*n1z

Materials
  mat1: Common "Silica glass" on domains 2
    def "Basic"
      relpermeability = 1
      electricconductivity = 1e-14[S/m]
      thermalexpansioncoefficient = 0.55e-6[1/K]
      heatcapacity = 703[J/(kg*K)]
      relpermittivity = 3.75
      density = 2203[kg/m^3]
      thermalconductivity = 1.38[W/(m*K)]
    Enu "Young's modulus and Poisson's ratio"
      E = 73.1[GPa]
      nu = 0.17
    RefractiveIndex
      n = 1.5
      ki = 0

Physics
  gop: GeometricalOptics on all domains
    dependent variable q = {qx, qy, qz}
    CountReflections.CountReflections = 1
    MaximumSecondary.MaximumSecondary = 0
    mp1: MediumProperties (default) | n_mat = userdef; n = 1.4
    matd1: MaterialDiscontinuity (default) | ReleaseReflectedRays = Never
    op1: RayProperties | RayPropertySpecification = SpecifyVacuumWavelength; nu = 4.54e14[Hz]; lambda0 = 660[nm]; mp = 1
    mir1: Mirror on boundaries 4, 11
    relg1: ReleaseGrid "Release from Grid 1" | GridType = Hexapolar; Rc = 0.005[m]; Ncr = 1; L0 = {sin(th), 0, cos(th)}
    rt1: RayTermination | SpatialExtentsOfRayPropagation = BoundingBoxFromGeometry
    wall1: Wall on boundaries 1-3, 9, 10, 12, 13, 15, 16, 18 | WallCondition = Disappear

Mesh
  mesh1 "Mesh 1" (physics-controlled)

Studies
  std1 "Study 1"
    rtrac: RayTracing | tlist = range(0,T0/10,T0); raystopcond = reflections; numberofreflections = 2

Solver configurations
  sol1 "Solution 1" (study std1)
    v1: Variables "Dependent Variables 1"
    t1: Time "Time-Dependent Solver 1"
      tlist = range(0,T0/10,T0)
      rtol = 1.0E-5
      timemethod = genalpha
      estrat = exclude
      tstepsgenalpha = strict
      stDef1: StopCondition
      fc1: FullyCoupled | linsolver = i1; ntolfact = 0.1
      i1: Iterative
        ja1: Jacobi
  sol2 "Parametric Solutions 1" (study std1)

Datasets
  dset1: Solution | solution = sol1
  ray1: Ray
    solution = sol1
    rgeomspec = fromphysics
    rgeom = pgeom_gop
    posdof = {comp1.qx, comp1.qy, comp1.qz}
    physicsinterface = gop
  dset2: Solution | solution = sol2

Plots
  pg1: PlotGroup3D "Ray Trajectories (gop)" | data = ray1
    rtrj1: RayTrajectories
      col1: Color "Color Expression 1" | expr = t
      filt1: RayTrajectoriesFilter "Filter 1"
  pg2: PlotGroup1D "1D Plot Group 2" | data = dset1